// SBML level 3 version 2

model biocrnpyler_922563()
  // model units - substance: mole, time: second, volume: litre, area: square_metre, length: metre, extent: mole

  // Compartments:
  compartment default = 1e-6;

  // Species:
  species E in default = 0;
  species S in default = 0;
  species P in default = 0;
  species complex_E_S_ in default = 0;

  // Parameters:
  kb__ = 100;
  ku__ = 10;
  kcat__ = 1;

  // Reactions:
  r0: S + E => complex_E_S_; kb__*S*E;
  r0rev: complex_E_S_ => S + E; ku__*complex_E_S_;
  r1: complex_E_S_ => P + E; kcat__*complex_E_S_;

  // Unit definitions:
  unit square_metre = metre^2;
end
